# OpenSim document version 40000
Model MonkeyArmCurrent:
  gravity: 0 -9.80665 0
  credits: Model authors names..
  publications: List of publications related to model...
  length_units: meters
  force_units: N
  Ground:
    WrapEllipsoid THORAX: xyz_body_rotation=(0.0523599 -0.331962 0.189892) translation=(-0.005 -0.04 -0.035)
        quadrant=all dimensions=(0.045 0.055 0.025)
  BodySet:
    Body sternum: mass=6.6 [kg] mass_center=(0 0 0) inertia=(0 0 0 0 0 0) meshes=sternum.vtp
    Body clavicle: mass=0 mass_center=(0 0 0) inertia=(0 0 0 0 0 0) meshes=clavicle.vtp
    Body scapula: mass=0 mass_center=(0 0 0) inertia=(0 0 0 0 0 0) meshes=scapula.vtp
    Body humerus: mass=0.203 mass_center=(0 -0.0555 0) inertia=(0.000293 0.000173 0.000293 0 0 0) meshes=humerus.vtp
      WrapCylinder ELBOW_EXTENSOR: xyz_body_rotation=(0 0.0523599 0) translation=(0.000223 -0.122 -0.002123)
          quadrant=all radius=0.009 length=0.025
      WrapCylinder ELBOW_ANC: translation=(0.001 -0.123 0.005) quadrant=-x radius=0.01 length=0.02
      WrapEllipsoid SHOULDER_HUMERUS: translation=(0 0.001 0.001) quadrant=all dimensions=(0.013 0.008 0.01)
    Body ulna1: mass=0 mass_center=(0 0 0) inertia=(0 0 0 0 0 0)
    Body ulna: mass=0.0922 mass_center=(0.004 -0.045 0.004) inertia=(0.000143 2.07e-5 0.000143 0 0 0) meshes=ulna.vtp
      WrapTorus ELBOW_ULNA: xyz_body_rotation=(-1.5708 0.785398 0) translation=(-0.02 0.02065 -0.005) quadrant=all
          inner_radius=0.005 outer_radius=0.015
    Body radius_jcc: mass=1e-6 mass_center=(0 0 0) inertia=(1e-7 1e-7 1e-7 0 0 0)
    Body radius: mass=0.0618 mass_center=(0.008 -0.045 0.008) inertia=(9.53e-5 1.38e-6 9.53e-5 0 0 0) meshes=radius.vtp
      WrapEllipsoid RADIUS_SUP: xyz_body_rotation=(1.5708 0.0872665 0) translation=(0.006 -0.08 -0.005) quadrant=all
          dimensions=(0.006 0.006 0.05)
      WrapCylinder BICEPS_SUP: xyz_body_rotation=(1.5708 0 0) translation=(0.0009 -0.0202 0) quadrant=-y radius=0.004
          length=0.017
      WrapEllipsoid WRIST_1: translation=(0.01 -0.13 0) quadrant=all dimensions=(0.008 0.008 0.005)
      WrapEllipsoid WRIST_2: translation=(0.01 -0.13 0) quadrant=all dimensions=(0.008 0.008 0.008)
      WrapTorus WRIST_FLEX_EXT: xyz_body_rotation=(1.5708 0 0) translation=(0.005 -0.135 0.007) quadrant=all
          inner_radius=0.003 outer_radius=0.005
      WrapTorus WRIST_BREVIS: xyz_body_rotation=(1.5708 0 0) translation=(0.0086 -0.135 0.00636) quadrant=all
          inner_radius=0.003 outer_radius=0.005
      WrapTorus WRIST_LONGUS: xyz_body_rotation=(1.5708 0 0) translation=(0.01617 -0.135 0.00525) quadrant=all
          inner_radius=0.003 outer_radius=0.005
    Body radius1: mass=0 mass_center=(0 0 0) inertia=(0 0 0 0 0 0)
    Body hand: mass=0.049 mass_center=(0.012 -0.025 0.007) inertia=(3.82e-5 1.56e-6 3.82e-5 0 0 0) meshes=hand.vtp
  JointSet:
    WeldJoint ground_sternum: socket_parent_frame=ground_offset socket_child_frame=sternum_offset
      PhysicalOffsetFrame ground_offset: socket_parent=/ground translation=(0 0 0) [meters]
      PhysicalOffsetFrame sternum_offset: socket_parent=/bodyset/sternum translation=(0 0 0)
    WeldJoint sterno_clavicle: socket_parent_frame=sternum_offset socket_child_frame=clavicle_offset
      PhysicalOffsetFrame sternum_offset: socket_parent=/bodyset/sternum translation=(0 0 0)
      PhysicalOffsetFrame clavicle_offset: socket_parent=/bodyset/clavicle translation=(0 0 0)
    WeldJoint clav_scapular: socket_parent_frame=clavicle_offset socket_child_frame=scapula_offset
      PhysicalOffsetFrame clavicle_offset: socket_parent=/bodyset/clavicle translation=(0 0 0)
      PhysicalOffsetFrame scapula_offset: socket_parent=/bodyset/scapula translation=(0 0 0)
    CustomJoint shoulder: socket_parent_frame=scapula_offset socket_child_frame=humerus_offset
      Coordinate shoulder_adduction: default_value=0 range=(-1.745329 0.8726646) clamped=false
      Coordinate shoulder_rotation: default_value=0 range=(-1.396263 1.570796) clamped=false
      Coordinate shoulder_flexion: default_value=0 range=(-1.308997 1.570796) clamped=false
      PhysicalOffsetFrame scapula_offset: socket_parent=/bodyset/scapula translation=(0 0.002 0.005)
      PhysicalOffsetFrame humerus_offset: socket_parent=/bodyset/humerus translation=(0 0 0)
      SpatialTransform: axes_held_at_zero=(translation1 translation2 translation3)
        TransformAxis rotation1: coordinates=shoulder_adduction axis=(1 0 0) LinearFunction(coefficients=1 0)
        TransformAxis rotation2: coordinates=shoulder_rotation axis=(0 1 0) LinearFunction(coefficients=1 0)
        TransformAxis rotation3: coordinates=shoulder_flexion axis=(0 0 1) LinearFunction(coefficients=1 0)
    CustomJoint elbow: socket_parent_frame=humerus_offset socket_child_frame=ulna1_offset
      Coordinate elbow_flexion: default_value=1.570796 range=(0.3490659 2.443461) clamped=false
      PhysicalOffsetFrame humerus_offset: socket_parent=/bodyset/humerus translation=(0 -0.125 -0.003)
      PhysicalOffsetFrame ulna1_offset: socket_parent=/bodyset/ulna1 translation=(0 0 0)
      SpatialTransform: axes_held_at_zero=(rotation2 rotation3 translation1 translation2 translation3)
        TransformAxis rotation1: coordinates=elbow_flexion axis=(0 0 1) LinearFunction(coefficients=1 0)
    WeldJoint ulna1: socket_parent_frame=ulna1_offset socket_child_frame=ulna_offset
      PhysicalOffsetFrame ulna1_offset: socket_parent=/bodyset/ulna1 translation=(0 0 0)
      PhysicalOffsetFrame ulna_offset: socket_parent=/bodyset/ulna translation=(0 0 0)
    CustomJoint ulnar_radial: socket_parent_frame=ulna_offset socket_child_frame=radius_jcc_offset
      Coordinate radial_pronation: default_value=0 range=(-1.570796 1.570796) clamped=false
      PhysicalOffsetFrame ulna_offset: socket_parent=/bodyset/ulna translation=(0 -0.008 0.005)
          orientation=(0.0355158 0 0.01309) [radians]
      PhysicalOffsetFrame radius_jcc_offset: socket_parent=/bodyset/radius_jcc translation=(0 0 0)
      SpatialTransform: axes_held_at_zero=(rotation1 rotation3 translation1 translation2 translation3)
        TransformAxis rotation2: coordinates=radial_pronation axis=(0 1 0) LinearFunction(coefficients=1 0)
    WeldJoint ulnar_radial_jcc: socket_parent_frame=radius_jcc_offset socket_child_frame=radius_offset
      PhysicalOffsetFrame radius_jcc_offset: socket_parent=/bodyset/radius_jcc translation=(0 0 0)
          orientation=(-0.0355158 0 -0.01309)
      PhysicalOffsetFrame radius_offset: socket_parent=/bodyset/radius translation=(0 0 0)
    WeldJoint wrist_tmp: socket_parent_frame=radius_offset socket_child_frame=radius1_offset
      PhysicalOffsetFrame radius_offset: socket_parent=/bodyset/radius translation=(0.007 -0.132 -0.0015)
          orientation=(-0.00060924 0 0)
      PhysicalOffsetFrame radius1_offset: socket_parent=/bodyset/radius1 translation=(0 0 0)
    CustomJoint wrist: socket_parent_frame=radius1_offset socket_child_frame=hand_offset
      Coordinate wrist_flexion: default_value=0 range=(-1.308997 1.570796) clamped=false
      Coordinate wrist_abduction: default_value=0 range=(-1.047198 0.7853982) clamped=false
      PhysicalOffsetFrame radius1_offset: socket_parent=/bodyset/radius1 translation=(0 0 0)
      PhysicalOffsetFrame hand_offset: socket_parent=/bodyset/hand translation=(0 0 0)
      SpatialTransform: axes_held_at_zero=(rotation3 translation1 translation2 translation3)
        TransformAxis rotation1: coordinates=wrist_flexion axis=(1 0 0) LinearFunction(coefficients=1 0)
        TransformAxis rotation2: coordinates=wrist_abduction axis=(0 0 1) LinearFunction(coefficients=1 0)
  ForceSet:
    Schutte1993Muscle_Deprecated [values shared by the 39 below unless stated]: time_scale=0 activation1=0
        activation2=0 damping=0.05
      tendon_force_length_curve: SimmSpline: x=(-10 -0.002 -0.001 0 0.00131 0.00281 0.00431 0.00581 0.00731 0.00881 0.0103 0.0118 0.0123 9.2 9.201 9.202 20)
          y=(0 0 0 0 0.0108 0.0257 0.0435 0.0652 0.0915 0.123 0.161 0.208 0.227 345 345 345 345)
      active_force_length_curve: SimmSpline: x=(-35 0 0.401 0.402 0.4035 0.52725 0.62875 0.71875 0.86125 1.045 1.2175 1.43875 1.61875 1.62 1.621 2.2 35)
          y=(0 0 0 0 0 0.226667 0.636667 0.856667 0.95 0.993333 0.77 0.246667 0 0 0 0 0)
      passive_force_length_curve: SimmSpline: x=(-35 0.998 0.999 1.15 1.25 1.35 1.45 1.55 1.65 1.75 1.7501 1.7502 35)
          y=(0 0 0 0 0.035 0.12 0.26 0.55 1.17 2 2 2 2)
    Schutte1993Muscle_Deprecated abd_poll_longus: max_isometric_force=30 optimal_fiber_length=0.089754
        tendon_slack_length=0.0285 pennation_angle_at_optimal=0 [radians] max_contraction_velocity=0.3
      PathPoint P1: ulna (-0.0134542 -0.036131 0.00779)
      PathPoint default: ulna (-0.00589149 -0.0744007 0.00540344)
      PathPoint P3: radius (0.00676938 -0.129509 0.00708684)
      PathPoint P4: hand (0.00704809 -0.00538695 0.00708962)
      PathPoint P3_0: hand (0.0120716 -0.0190709 0.00350984)
      PathWrap: wrap_object=RADIUS_SUP method=hybrid
    Schutte1993Muscle_Deprecated anconeus: max_isometric_force=30 optimal_fiber_length=0.010206
        tendon_slack_length=0.019627 pennation_angle_at_optimal=0 max_contraction_velocity=0.2392
      PathPoint P1: humerus (-0.00632836 -0.115053 0.00349906)
      PathPoint P2: ulna (-0.0095746 -0.0110556 0.00734644)
      PathWrap: wrap_object=ELBOW_ANC method=axial
    Schutte1993Muscle_Deprecated bicep_lh: max_isometric_force=58.2 optimal_fiber_length=0.122492
        tendon_slack_length=0.070845 pennation_angle_at_optimal=0.1221731 max_contraction_velocity=0.682
      PathPoint P1: scapula (-0.001415 0.0116716 -0.00421882)
      PathPoint P2: humerus (0.00834146 0.00619877 -0.00662536)
      PathPoint P2_0: humerus (0.0137371 0.00030917 -0.00251563)
      PathPoint P3: humerus (0.0152399 -0.00829801 0.00267377)
      PathPoint P4: humerus (0.0173307 -0.0176342 0.00348195)
      PathPoint P4_0: humerus (0.01641 -0.09299 0.00122)
      PathPoint P4_1: radius (-0.0031344 -0.0226197 -0.00049658)
      PathWrap: wrap_object=ELBOW_EXTENSOR method=hybrid
      PathWrap pathwrap_0: wrap_object=BICEPS_SUP method=hybrid
      PathWrap pathwrap_1: wrap_object=SHOULDER_HUMERUS method=hybrid
    Schutte1993Muscle_Deprecated bicep_sh: max_isometric_force=38.7 optimal_fiber_length=0.122492
        tendon_slack_length=0.042526 pennation_angle_at_optimal=0 max_contraction_velocity=0.84
      PathPoint P1: scapula (0.005006 0.00403096 -0.00928048)
      PathPoint P2: humerus (0.0113466 -0.00789496 -0.0088837)
      PathPoint P2_0: humerus (0.0173119 -0.0163882 -0.00667662)
      PathPoint P2_1: humerus (0.01641 -0.09299 0.00122)
      PathPoint P2_2: radius (-0.00313456 -0.0226192 -0.00049636)
      PathWrap: wrap_object=ELBOW_EXTENSOR method=hybrid
      PathWrap pathwrap_0: wrap_object=SHOULDER_HUMERUS method=hybrid
      PathWrap pathwrap_1: wrap_object=BICEPS_SUP method=hybrid
    Schutte1993Muscle_Deprecated brachialis: max_isometric_force=135.6 optimal_fiber_length=0.057
        tendon_slack_length=0.03502 pennation_angle_at_optimal=0 max_contraction_velocity=0.529
      PathPoint P1: humerus (0.00898936 -0.0531827 0.00609122)
      PathPoint P2: ulna (-0.00689449 -0.0167103 -0.00011849)
      PathWrap: wrap_object=ELBOW_EXTENSOR method=hybrid
    Schutte1993Muscle_Deprecated brachioradialis: max_isometric_force=38.7 optimal_fiber_length=0.122492
        tendon_slack_length=0.04335 pennation_angle_at_optimal=0 max_contraction_velocity=1.453
      PathPoint P1: humerus (0.00241165 -0.0781182 0.00768392)
      PathPoint P2: radius (0.0145975 -0.0292495 0.00077764)
      PathPoint P3: radius (0.0176545 -0.132166 0.00106433)
    Schutte1993Muscle_Deprecated coracobrachialis: max_isometric_force=38.7 optimal_fiber_length=0.085942
        tendon_slack_length=0.002 pennation_angle_at_optimal=0.2268928 max_contraction_velocity=0.18
      PathPoint P1: scapula (0.00568137 0.00332641 -0.00985539)
      PathPoint P2: scapula (0.00752866 -0.00741225 0.00049928)
      PathPoint P3: humerus (0.00537791 -0.0281937 -0.00207885)
      PathPoint P4: humerus (0.0102654 -0.0399106 -0.00060604)
      PathPoint P3_0: humerus (0.00898831 -0.0531843 0.00609106)
      PathWrap: wrap_object=SHOULDER_HUMERUS method=hybrid
    Schutte1993Muscle_Deprecated deltoid_ant: max_isometric_force=135.6 optimal_fiber_length=0.0455
        tendon_slack_length=0.002 pennation_angle_at_optimal=0 max_contraction_velocity=0.62
      PathPoint P1: clavicle (0.0120089 0.0199837 -0.0123066)
      PathPoint P2: scapula (0.0124096 0.0148434 0.00160382)
      PathPoint P3: humerus (0.0114653 -0.0350968 0.00589031)
      PathWrap: wrap_object=SHOULDER_HUMERUS method=axial
    Schutte1993Muscle_Deprecated deltoid_med: max_isometric_force=116.1 optimal_fiber_length=0.051036
        tendon_slack_length=0.002 pennation_angle_at_optimal=0.3490659 max_contraction_velocity=0.31
      PathPoint P1: scapula (-0.00413097 0.0134429 0.00897914)
      PathPoint P2: scapula (-0.00280437 0.0102632 0.0149334)
      PathPoint P3: humerus (0.0128964 -0.0349655 0.00764048)
      PathWrap: wrap_object=SHOULDER_HUMERUS method=hybrid
    Schutte1993Muscle_Deprecated deltoid_pos: max_isometric_force=406.5 optimal_fiber_length=0.06898635
        tendon_slack_length=0.002 pennation_angle_at_optimal=0 max_contraction_velocity=0.604
      PathPoint P1: scapula (-0.031415 0.00518007 -0.0114773)
      PathPoint P2: humerus (-0.0186943 -0.00808775 0.0133007)
      PathPoint P3: humerus (0.00512701 -0.0344488 0.0103991)
    Schutte1993Muscle_Deprecated dorsoepitrochlearis: max_isometric_force=44.8 optimal_fiber_length=0.122492
        tendon_slack_length=0.039172 pennation_angle_at_optimal=0 max_contraction_velocity=0.707
      PathPoint P1: scapula (0.00803711 -0.0326048 -0.00556196)
      PathPoint P2: humerus (-0.00192344 -0.0439945 -0.00058018)
      PathPoint P3: humerus (-0.00850242 -0.10306 -0.00470532)
      PathPoint P2_0: ulna (-0.00976546 0.0101558 -0.0070947)
      PathWrap: wrap_object=ELBOW_EXTENSOR method=hybrid
    Schutte1993Muscle_Deprecated ext_carpi_rad_longus: max_isometric_force=72 optimal_fiber_length=0.1173
        tendon_slack_length=0.055 pennation_angle_at_optimal=0.1553343 max_contraction_velocity=0.372
      PathPoint P1: humerus (2.342e-5 -0.0882464 0.00696635)
      PathPoint P2: radius (0.00885958 -0.0269329 0.00814727)
      PathPoint P3: radius (0.01484 -0.13599 0.00375)
      PathPoint P4: hand (0.00806575 -0.0297264 0.00471252)
      PathWrap: wrap_object=ELBOW_EXTENSOR method=hybrid
    Schutte1993Muscle_Deprecated ext_carp_rad_brevis: max_isometric_force=30 optimal_fiber_length=0.1225
        tendon_slack_length=0.0365 pennation_angle_at_optimal=0.01745329 max_contraction_velocity=0.682
      PathPoint P1: humerus (0.00495817 -0.113628 0.0146818)
      PathPoint P2: radius (0.00892746 -0.129406 0.00735588)
      PathPoint P3: hand (0.00286125 -0.00820514 0.00535315)
      PathPoint P2_0: hand (0.00201083 -0.0285152 0.0042954)
      PathWrap: wrap_object=RADIUS_SUP method=axial
    Schutte1993Muscle_Deprecated ext_carpi_ulnaris: max_isometric_force=30 optimal_fiber_length=0.122492
        tendon_slack_length=0.050385 pennation_angle_at_optimal=0.06108652 max_contraction_velocity=0.227
      PathPoint P1: humerus (0.00495863 -0.116878 0.0122446)
      PathPoint P2: radius (-0.00025815 -0.135178 0.00378109)
      PathPoint P3: hand (-0.00529569 -0.0121079 0.00443402)
      PathWrap: wrap_object=RADIUS_SUP method=axial
    Schutte1993Muscle_Deprecated ext_digitorum: max_isometric_force=30 optimal_fiber_length=0.122492
        tendon_slack_length=0.0457 pennation_angle_at_optimal=0.05235988 max_contraction_velocity=0.4557
      PathPoint P1: humerus (0.0045054 -0.114854 0.0146524)
      PathPoint P2: radius (0.00823679 -0.129805 0.00699904)
      PathPoint P3: hand (0.00106101 -0.00804001 0.00594996)
      PathPoint P2_0: hand (0.00222721 -0.0391191 0.00429738)
      PathWrap: wrap_object=RADIUS_SUP method=axial
    Schutte1993Muscle_Deprecated ext_digiti: max_isometric_force=30 optimal_fiber_length=0.122492
        tendon_slack_length=0.0603 pennation_angle_at_optimal=0.04537856 max_contraction_velocity=0.55
      PathPoint P1: humerus (0.0009439 -0.118829 0.0128691)
      PathPoint P2: radius (0.00273506 -0.128023 0.00782584)
      PathPoint P3: hand (-0.00496082 -0.012152 0.00583044)
      PathPoint P2_0: hand (-0.00870747 -0.0274009 0.00430346)
      PathWrap: wrap_object=RADIUS_SUP method=axial
    Schutte1993Muscle_Deprecated ext_indicis: max_isometric_force=30 optimal_fiber_length=0.044047
        tendon_slack_length=0.030981 pennation_angle_at_optimal=0.1099557 max_contraction_velocity=0.4196
      PathPoint P1: ulna (-0.0106748 -0.0669418 0.00431148)
      PathPoint P2: radius (0.00266475 -0.11007 0.00567202)
      PathPoint P3: radius (0.00493 -0.13294 0.00262)
      PathPoint P4: hand (0.0067409 -0.0213957 0.00653257)
    Schutte1993Muscle_Deprecated flex_carpi_radialis: max_isometric_force=60 optimal_fiber_length=0.122492
        tendon_slack_length=0.042532 pennation_angle_at_optimal=0.05410521 max_contraction_velocity=0.2697
      PathPoint P1: humerus (0.00060897 -0.122704 -0.00973851)
      PathPoint P2: radius (0.0108332 -0.131353 -0.00634294)
      PathPoint P3: hand (0.0107732 -0.0114522 -0.0001884)
      PathWrap: wrap_object=RADIUS_SUP method=axial
    Schutte1993Muscle_Deprecated flex_carpi_ulnaris: max_isometric_force=96 optimal_fiber_length=0.044632
        tendon_slack_length=0.122492 pennation_angle_at_optimal=0.2111848 max_contraction_velocity=0.227
      PathPoint P1: ulna (-0.00626395 -0.00576911 -0.00528576)
      PathPoint P2: radius (0.0016464 -0.131236 -0.00700539)
      PathPoint P3: hand (-0.00346201 -0.00910496 -0.0019235)
      PathWrap: wrap_object=RADIUS_SUP method=axial
    Schutte1993Muscle_Deprecated flex_digit_profundus: max_isometric_force=30 optimal_fiber_length=0.06132958
        tendon_slack_length=0.04029373 pennation_angle_at_optimal=0.1204277 max_contraction_velocity=0.6083
      PathPoint P1: ulna (-0.00910546 -0.0460418 0.00095037)
      ConditionalPathPoint P2: radius (0.0074 -0.12242 -0.0072)
          socket_coordinate=/jointset/ulnar_radial/radial_pronation range=(-1.5708 0.352382) [radians]
      PathPoint P3: radius (0.0109418 -0.133962 -0.00656384)
      PathPoint P4: hand (-0.00139132 -0.0172483 -0.00108922)
      PathWrap: wrap_object=RADIUS_SUP method=axial
    Schutte1993Muscle_Deprecated flex_digit_superficialis: max_isometric_force=30 optimal_fiber_length=0.122492
        tendon_slack_length=0.072174 pennation_angle_at_optimal=0.09599311 max_contraction_velocity=0.5306
      PathPoint P1: humerus (-0.00359 -0.12211 -0.01146)
      PathPoint P2: radius (0.0115119 -0.132662 -0.00824617)
      PathPoint P3: hand (-0.00060287 -0.0373804 -0.00082)
      PathWrap: wrap_object=RADIUS_SUP method=axial
    Schutte1993Muscle_Deprecated flex_poll_longus: max_isometric_force=30 optimal_fiber_length=0.028065
        tendon_slack_length=0.060818 pennation_angle_at_optimal=0.1209513 max_contraction_velocity=0.5944
      PathPoint P1: radius (0.005328 -0.0433027 -0.00663943)
      PathPoint P2: radius (0.0088 -0.13166 -0.00773)
      PathPoint P3: hand (0.00316994 -0.018195 -0.00122613)
      PathWrap: wrap_object=WRIST_2 method=hybrid
      PathWrap pathwrap_0: wrap_object=RADIUS_SUP method=axial
    Schutte1993Muscle_Deprecated infraspinatus: max_isometric_force=174.3 optimal_fiber_length=0.049413
        tendon_slack_length=0.002 pennation_angle_at_optimal=0.2617994 max_contraction_velocity=0.29
      PathPoint P1: scapula (-0.0170813 -0.0336418 -0.0287667)
      PathPoint P2: humerus (0.00656088 -0.00488467 0.0103085)
    Schutte1993Muscle_Deprecated lat_dorsi_sup: max_isometric_force=129 optimal_fiber_length=0.122492
        tendon_slack_length=0.002 pennation_angle_at_optimal=0 max_contraction_velocity=1.15
      PathPoint P1: scapula (-0.0518049 -0.05647 -0.0490717)
      PathPoint P2: scapula (-0.0343128 -0.0380677 -0.0208317)
      PathPoint P3: scapula (-0.0139569 -0.0257503 -0.0102175)
      PathPoint P2_0: humerus (0.00209131 -0.0269673 0.00787084)
      PathWrap: wrap_object=THORAX method=hybrid
    Schutte1993Muscle_Deprecated lat_dorsi_cen: max_isometric_force=129 optimal_fiber_length=0.1119
        tendon_slack_length=0.002 pennation_angle_at_optimal=0 max_contraction_velocity=1.15
      PathPoint P1: scapula (-0.0395885 -0.0844117 -0.0400967)
      PathPoint P2: scapula (-0.0262124 -0.0547087 -0.0179488)
      PathPoint P3: scapula (-0.00923915 -0.0366063 -0.00847752)
      PathPoint P2_0: humerus (0.00227203 -0.0268108 0.00775898)
      PathWrap: wrap_object=THORAX method=hybrid
    Schutte1993Muscle_Deprecated lat_dorsi_inf: max_isometric_force=129 optimal_fiber_length=0.1225
        tendon_slack_length=0.0087 pennation_angle_at_optimal=0 max_contraction_velocity=1.15
      PathPoint P1: scapula (-0.02259 -0.117562 -0.0281918)
      PathPoint P2: scapula (-0.0190108 -0.0726375 -0.0183598)
      PathPoint P3: scapula (-0.00671568 -0.0475658 -0.00855742)
      PathPoint P2_0: humerus (0.00228779 -0.0268855 0.00768377)
      PathWrap: wrap_object=THORAX method=hybrid
    Schutte1993Muscle_Deprecated palmaris_longus: max_isometric_force=27 optimal_fiber_length=0.122492
        tendon_slack_length=0.023407 pennation_angle_at_optimal=0.06108652 max_contraction_velocity=0.5001
      PathPoint P1: humerus (-0.00359122 -0.122112 -0.0114664)
      PathPoint P2: radius (0.01058 -0.12709 -0.00689)
      PathPoint P3: radius (0.0111999 -0.131741 -0.00604117)
      PathPoint P4: hand (0.00062154 -0.0123001 -0.001955)
      PathWrap: wrap_object=RADIUS_SUP method=axial
    Schutte1993Muscle_Deprecated pectoralis_sup: max_isometric_force=154.8 optimal_fiber_length=0.0541
        tendon_slack_length=0.002 pennation_angle_at_optimal=0 max_contraction_velocity=0.967
      PathPoint P1: clavicle (0.0296563 0.00221696 -0.0361728)
      PathPoint P2: clavicle (0.0204415 -0.0117942 -0.00990533)
      PathPoint P2_0: humerus (0.00931889 -0.0352931 0.00326588)
      PathWrap: wrap_object=THORAX method=hybrid
      PathWrap pathwrap_0: wrap_object=SHOULDER_HUMERUS method=hybrid
    Schutte1993Muscle_Deprecated pectoralis_inf: max_isometric_force=116.1 optimal_fiber_length=0.0648
        tendon_slack_length=0.002 pennation_angle_at_optimal=0 max_contraction_velocity=0.5453
      PathPoint P1: sternum (0.0331677 -0.0140839 -0.04725)
      PathPoint P3: sternum (0.0220229 -0.0186303 -0.00738581)
      PathPoint P2: humerus (0.00893849 -0.0389993 0.00322279)
      PathWrap: wrap_object=THORAX method=hybrid
      PathWrap pathwrap_0: wrap_object=SHOULDER_HUMERUS method=hybrid
    Schutte1993Muscle_Deprecated pronator_quad: max_isometric_force=33.3 optimal_fiber_length=0.025284
        tendon_slack_length=0.002 pennation_angle_at_optimal=0.1727876 max_contraction_velocity=0.2373
      PathPoint P1: ulna (-0.00609803 -0.0936326 -0.00163172)
      PathPoint P3: radius (0.00821347 -0.0959875 -0.00610373)
    Schutte1993Muscle_Deprecated pronator_teres: max_isometric_force=48.3 optimal_fiber_length=0.0416
        tendon_slack_length=0.01254 pennation_angle_at_optimal=0.2268928 max_contraction_velocity=0.2808
      PathPoint P1: humerus (0.00159854 -0.120028 -0.0102318)
      PathPoint P2: radius (0.00720098 -0.0451973 -0.00693245)
    Schutte1993Muscle_Deprecated subscapularis: max_isometric_force=290.4 optimal_fiber_length=0.05239
        tendon_slack_length=0.008831 pennation_angle_at_optimal=0.3839724 max_contraction_velocity=0.228
      PathPoint P1: scapula (-0.0401794 -0.0163557 -0.0434123)
      PathPoint P2: humerus (0.00455369 0.00455243 -0.00853652)
    Schutte1993Muscle_Deprecated supinator: max_isometric_force=30 optimal_fiber_length=0.045107
        tendon_slack_length=0.002 pennation_angle_at_optimal=0.296706 max_contraction_velocity=0.2958
      PathPoint P1: humerus (0.00151058 -0.115482 0.0146201)
      PathPoint P2: radius (0.00675303 -0.031047 -0.00170358)
    Schutte1993Muscle_Deprecated supraspinatus: max_isometric_force=135 optimal_fiber_length=0.069278
        tendon_slack_length=0.002 pennation_angle_at_optimal=0.2617994 max_contraction_velocity=0.275
      PathPoint P1: scapula (-0.039969 0.00880497 -0.0325724)
      PathPoint P2: scapula (-0.00702282 0.017184 -0.00390647)
      PathPoint P3: humerus (0.0105423 0.00853244 0.00842501)
      PathWrap: wrap_object=SHOULDER_HUMERUS method=hybrid
    Schutte1993Muscle_Deprecated teres_major: max_isometric_force=77.4 optimal_fiber_length=0.0815
        tendon_slack_length=0.002 pennation_angle_at_optimal=0.2443461 max_contraction_velocity=0.688
      PathPoint P1: scapula (-0.0448917 -0.0382902 -0.0269176)
      PathPoint P2: scapula (-0.00728912 -0.0192575 -0.00530986)
      PathPoint P2_0: humerus (0.00884004 -0.0284418 0.00066507)
    Schutte1993Muscle_Deprecated teres_minor: max_isometric_force=174 optimal_fiber_length=0.04029481
        tendon_slack_length=0.002 pennation_angle_at_optimal=0.2094395 max_contraction_velocity=0.19
      PathPoint P1: scapula (-0.0333031 -0.0109902 -0.0149465)
      PathPoint P2: scapula (-0.0167974 -0.00165682 0.00096117)
      PathPoint P3: scapula (-0.0125463 0.00302292 0.0114278)
      PathPoint P2_0: humerus (-0.00295662 0.00754551 0.00927424)
      PathWrap: wrap_object=SHOULDER_HUMERUS method=hybrid
    Schutte1993Muscle_Deprecated tricep_lat: max_isometric_force=135.6 optimal_fiber_length=0.122492
        tendon_slack_length=0.018409 pennation_angle_at_optimal=0.3665191 max_contraction_velocity=0.521
      PathPoint P1: humerus (0.00343606 -0.0120452 0.00817807)
      PathPoint P2: humerus (-0.00661123 -0.0482261 0.00844396)
      PathPoint P3: humerus (-0.0169 -0.10497 -0.00623)
      PathPoint P2_0: ulna (-0.0159459 0.00881669 -0.00513722)
      PathWrap: wrap_object=ELBOW_EXTENSOR method=hybrid
      PathWrap pathwrap_0: wrap_object=ELBOW_ULNA method=hybrid
    Schutte1993Muscle_Deprecated tricep_lon: max_isometric_force=116.1 optimal_fiber_length=0.106152
        tendon_slack_length=0.036031 pennation_angle_at_optimal=0.5410521 max_contraction_velocity=0.446
      PathPoint P1: scapula (-0.0262697 -0.0160721 -0.0101192)
      PathPoint P2: humerus (-0.00945771 -0.0479589 0.00358659)
      PathPoint P2_0: humerus (-0.0169 -0.10497 -0.00623)
      PathPoint P2_1: ulna (-0.0157669 0.00830524 -0.00558853)
      PathWrap: wrap_object=ELBOW_EXTENSOR method=hybrid
      PathWrap pathwrap_0: wrap_object=ELBOW_ULNA method=hybrid
    Schutte1993Muscle_Deprecated tricep_sho: max_isometric_force=135.6 optimal_fiber_length=0.093578
        tendon_slack_length=0.010198 pennation_angle_at_optimal=0.3141593 max_contraction_velocity=0.485
      PathPoint P1: humerus (0.00171795 -0.04211 0.00509713)
      PathPoint P2: humerus (-0.00706469 -0.0728094 -0.00347627)
      PathPoint P3: humerus (-0.0169 -0.10497 -0.00623)
      PathPoint P2_0: ulna (-0.0161454 0.00876453 -0.00503754)
      PathWrap: wrap_object=ELBOW_EXTENSOR method=hybrid
      PathWrap pathwrap_0: wrap_object=ELBOW_ULNA method=hybrid
    ObjectGroup wrist_flexor: members=(abd_poll_longus flex_carpi_ulnaris flex_digit_profundus flex_digit_superficialis flex_poll_longus palmaris_longus)
    ObjectGroup wrist_abductor: members=(abd_poll_longus ext_carp_rad_brevis ext_carpi_rad_longus ext_digiti ext_digitorum ext_indicis flex_carpi_radialis)
    ObjectGroup elbow_extensor: members=(anconeus dorsoepitrochlearis ext_carpi_rad_longus tricep_lat tricep_lon tricep_sho)
    ObjectGroup shoulder_abductor: members=(bicep_lh deltoid_ant deltoid_med deltoid_pos supraspinatus)
    ObjectGroup shoulder_flexor: members=(bicep_lh bicep_sh coracobrachialis deltoid_ant pectoralis_inf pectoralis_sup)
    ObjectGroup elbow_flexor: members=(bicep_lh bicep_sh brachialis brachioradialis flex_carpi_radialis palmaris_longus pronator_teres)
    ObjectGroup supinator: members=(bicep_lh bicep_sh brachioradialis supinator)
    ObjectGroup shoulder_adductor: members=(bicep_sh coracobrachialis dorsoepitrochlearis lat_dorsi_cen lat_dorsi_inf lat_dorsi_sup pectoralis_inf pectoralis_sup teres_major tricep_lat)
    ObjectGroup pronator: members=(brachioradialis flex_carpi_radialis pronator_quad pronator_teres)
    ObjectGroup shoulder_inrot: members=(deltoid_ant lat_dorsi_cen lat_dorsi_inf lat_dorsi_sup pectoralis_inf pectoralis_sup subscapularis teres_major)
    ObjectGroup shoulder_exrot: members=(deltoid_pos teres_minor)
    ObjectGroup shoulder_extensor: members=(deltoid_pos dorsoepitrochlearis lat_dorsi_cen lat_dorsi_inf lat_dorsi_sup teres_major tricep_lat)
    ObjectGroup wrist_extensor: members=(ext_carp_rad_brevis ext_carpi_rad_longus ext_carpi_ulnaris ext_digiti ext_digitorum ext_indicis flex_carpi_radialis)
    ObjectGroup wrist_adductor: members=(ext_carpi_ulnaris flex_carpi_ulnaris)
    ObjectGroup shouler_exrot: members=infraspinatus
  MarkerSet:
    Marker Marker_8: humerus (0.005 -0.02 0.005)
    Marker Marker_7: humerus (0.005 -0.09 0.005)
    Marker Marker_6: ulna (-0.01 0 0.005) fixed=true
    Marker Marker_4: radius (0.015 -0.13 0.005)
    Marker Marker_5: radius (0 -0.13 0.005)
    Marker Marker_2: hand (0.007 -0.025 0.002)
    Marker Marker_3: hand (-0.004 -0.025 0.002)
    Marker Marker_1: hand (0.0015 -0.04 0.002)
    Marker Shoulder_JC: humerus (0 0 0)
    Marker Elbow_JC: ulna (0 0 0)
    Marker Pronation_Pt1: ulna (0 -0.008 0.005)
    Marker Wrist_JC: radius_jcc (0.00527157 -0.13205 0.0031909)
    Marker Pronation_Pt2: radius_jcc (0 -0.132 0)
